**
** Heading +++++++++++++++++++++++++++++++++++++++++++++++++
**
*Heading
Model: Model-1,     Date: 09/28/2018
**
** Nodes +++++++++++++++++++++++++++++++++++++++++++++++++++
**
*Node
1, 9.42340000E+001, 9.66312190E+000, 3.55600000E+000
2, 1.15357764E+002, 2.18732358E-001, 3.55600000E+000
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**
** Elements ++++++++++++++++++++++++++++++++++++++++++++++++
**
*Element, Type=C3D4, Elset=Solid_Part-1
5725, 1423, 2526, 2987, 1387
5726, 3218, 3219, 3220, 3221
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**
** Node sets +++++++++++++++++++++++++++++++++++++++++++++++
**
*Nset, Nset=bearing_faces
83, 84, 85, 88, 89, 90
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*Nset, Nset=bolt1_faces
103, 104, 105, 106, 570, 571, 572, 573, 2500, 2501, 2502, 2503, 2504, 2505
*Nset, Nset=bolt2_faces
91, 92, 93, 94, 558, 559, 560, 561, 2470, 2471, 2472, 2473, 2474, 2475
*Nset, Nset=bolt3_faces
99, 100, 101, 102, 566, 567, 568, 569, 2490, 2491, 2492, 2493, 2494, 2495
*Nset, Nset=bolt4_faces
95, 96, 97, 98, 562, 563, 564, 565, 2480, 2481, 2482, 2483, 2484, 2485
**
** Element sets ++++++++++++++++++++++++++++++++++++++++++++
**
*Elset, Elset=nondesign_space
18285, 18286, 18287, 18288, 18289, 18290
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*Elset, Elset=design_space
5725, 5726, 5727, 5728, 5729, 5730
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
**
** Surfaces ++++++++++++++++++++++++++++++++++++++++++++++++
**
**
** Materials +++++++++++++++++++++++++++++++++++++++++++++++
**
*Material, Name=Material-1
*Elastic
200000, 0.27
**
** Sections ++++++++++++++++++++++++++++++++++++++++++++++++
**
*Solid section, Elset=design_space, Material=Material-1
*Solid section, Elset=nondesign_space, Material=Material-1
**
** Constraints +++++++++++++++++++++++++++++++++++++++++++++
**
*Rigid body, Nset=bearing_faces, Ref node=3688, Rot node=3689
**
** Steps +++++++++++++++++++++++++++++++++++++++++++++++++++
**
**
** Step-1 ++++++++++++++++++++++++++++++++++++++++++++++++++
**
*Step
*Static
**
** Boundary conditions +++++++++++++++++++++++++++++++++++++
**
*Boundary, op=NEW
** Name: BC-1
*Boundary
bolt1_faces, 1, 1, 0
bolt1_faces, 2, 2, 0
bolt1_faces, 3, 3, 0
** Name: BC-2
*Boundary
bolt2_faces, 1, 1, 0
bolt2_faces, 2, 2, 0
bolt2_faces, 3, 3, 0
** Name: BC-3
*Boundary
bolt3_faces, 1, 1, 0
bolt3_faces, 2, 2, 0
bolt3_faces, 3, 3, 0
** Name: BC-4
*Boundary
bolt4_faces, 1, 1, 0
bolt4_faces, 2, 2, 0
bolt4_faces, 3, 3, 0
**
** Loads +++++++++++++++++++++++++++++++++++++++++++++++++++
**
*Dload, op=NEW
*Cload, op=NEW
** Name: Load-1
*Cload
3688, 1, 281
**
** Field outputs +++++++++++++++++++++++++++++++++++++++++++
**
*Node file
RF, U
*El file
S
**
** End step ++++++++++++++++++++++++++++++++++++++++++++++++
**
*End step
**
** Step-2 ++++++++++++++++++++++++++++++++++++++++++++++++++
**
*Step
*Static
**
** Boundary conditions +++++++++++++++++++++++++++++++++++++
**
*Boundary, op=NEW
** Name: BC-1
*Boundary
bolt1_faces, 1, 1, 0
bolt1_faces, 2, 2, 0
bolt1_faces, 3, 3, 0
** Name: BC-2
*Boundary
bolt2_faces, 1, 1, 0
bolt2_faces, 2, 2, 0
bolt2_faces, 3, 3, 0
** Name: BC-3
*Boundary
bolt3_faces, 1, 1, 0
bolt3_faces, 2, 2, 0
bolt3_faces, 3, 3, 0
** Name: BC-4
*Boundary
bolt4_faces, 1, 1, 0
bolt4_faces, 2, 2, 0
bolt4_faces, 3, 3, 0
**
** Loads +++++++++++++++++++++++++++++++++++++++++++++++++++
**
*Dload, op=NEW
*Cload, op=NEW
** Name: Load-1
*Cload
3688, 1, 298
3688, 2, -298
**
** Field outputs +++++++++++++++++++++++++++++++++++++++++++
**
*Node file
RF, U
*El file
S
**
** End step ++++++++++++++++++++++++++++++++++++++++++++++++
**
*End step
**
** Step-3 ++++++++++++++++++++++++++++++++++++++++++++++++++
**
*Step
*Static
**
** Boundary conditions +++++++++++++++++++++++++++++++++++++
**
*Boundary, op=NEW
** Name: BC-1
*Boundary
bolt1_faces, 1, 1, 0
bolt1_faces, 2, 2, 0
bolt1_faces, 3, 3, 0
** Name: BC-2
*Boundary
bolt2_faces, 1, 1, 0
bolt2_faces, 2, 2, 0
bolt2_faces, 3, 3, 0
** Name: BC-3
*Boundary
bolt3_faces, 1, 1, 0
bolt3_faces, 2, 2, 0
bolt3_faces, 3, 3, 0
** Name: BC-4
*Boundary
bolt4_faces, 1, 1, 0
bolt4_faces, 2, 2, 0
bolt4_faces, 3, 3, 0
**
** Loads +++++++++++++++++++++++++++++++++++++++++++++++++++
**
*Dload, op=NEW
*Cload, op=NEW
** Name: Load-1
*Cload
3688, 2, -562
**
** Field outputs +++++++++++++++++++++++++++++++++++++++++++
**
*Node file
RF, U
*El file
S
**
** End step ++++++++++++++++++++++++++++++++++++++++++++++++
**
*End step
